!EX2.6C热轧不等边角钢实体建模
FINISH
/CLEAR
/PREP7
DB=100
XB=80
D=10
R=10
R1=D/3
XD=1/10
L=300
K,1
K,2,XB
K,3,XB,D
K,4,D,D
K,5,D,DB
K,6,0,DB
*DO,I,1,5
L,I,I+1
*ENDDO
L,1,6
LFILLT,3,4,R
LFILLT,2,3,R1
LFILLT,4,5,R1
AL,ALL
VOFFST,1,L
