!EX2.7B 空心高墩墩身建模
FINISH
/CLEAR
/PREP7
H=30
D=5.78
B=1.9
T=0.8
INSL=1/65
OUTSL=1/46
CYL4,B/2,,D/2,,,90
BLC4,,,B/2,D/2
AADD,ALL
NUMCMP,ALL
CYL4,B/2,,D/2-T,,,90
BLC4,,,B/2,D/2-T
AADD,2,3
NUMCMP,ALL
RX1=1-H*OUTSL/(0.5*(B+D))
RY1=1-H*OUTSL/(0.5*D)
VEXT,1,,,0,0,H,RX1,RY1
RX1=1-INSL*H/((B+D)/2-T)
RY1=1-INSL*H/(D/2-T)
VEXT,2,,,0,0,H,RX1,RY1
VSBV,1,2
VSYMM,X,ALL
VSYMM,Y,ALL
VGLUE,ALL
NUMCMP,ALL
