!EX2.9C 旋转图素建模
!类花瓶建模--------------------
finish
/clear
/prep7
K,1
K,2,100
K,3,300,400
K,4,150,550
k,5,130,880
K,6,300,1150
k,7,400,1100
k,8,500,1150
bsplin,all
k,1001,,1000
arotat,all,,,,,,1,1001,360,5
!类轮建模----------------------
finish
/clear
/prep7
!先创建类轮结构的一个断面，然后旋转之
blc4,,,4,6
cyl4,2,6,1.5
asba,1,2
k,100,-3
k,101,-3,10
vrotat,all,,,,,,100,101
