!EX3.3A 单个方位关键点示例
FINISH
/CLEAR
/PREP7
ET,1,BEAM189
MP,EX,1,2.1E5
MP,PRXY,1,0.3
SECTYPE,1,BEAM,I
SECDATA,100,40,160,10,10,8
K,1
K,2,,,1000
L,1,2
K,100,,500,500
LATT,1,,1,,100,,1
LGEN,4,1,,,500
LESIZE,ALL,,,10
LMESH,ALL
/ESHAPE,1
EPLOT
