!EX3.3B 同时使用KB和KE方位关键点示例
FINISH
/CLEAR
/PREP7
ET,1,BEAM189
MP,EX,1,2.1E5
MP,PRXY,1,0.3
SECTYPE,1,BEAM,I
SECDATA,100,40,160,10,10,8
L0=1000
DL=500
DXC=400
K,1
K,2,,,L0
L,1,2
K,100,,DL
K,200,DXC,-DL
K,300,2*DXC,DL
K,301,2*DXC+DL
K,400
K,500,8*DXC
LGEN,5,1,,,DXC
LSEL,S,,,1
LATT,1,,1,,100,,1
LSEL,S,,,2
LATT,1,,1,,200,,1
LSEL,S,,,3
LATT,1,,1,,300,301,1
LSEL,S,,,4
LATT,1,,1,,400,,1
LSEL,S,,,5
LATT,1,,1,,500,,1
LSEL,ALL
LESIZE,ALL,,,50
LMESH,ALL
/ESHAPE,1
EPLOT
