!EX3.3C 双方位关键点翻转示例
FINISH
/CLEAR
/PREP7
ET,1,BEAM189
MP,EX,1,2.1E5
MP,PRXY,1,0.3
SECTYPE,1,BEAM,I
SECDATA,100,40,160,10,10,8
L0=1000
DL=500
DXC=400
K,1
K,2,,,L0
K,3,DXC
K,4,DXC,,L0/2
K,5,DXC,,L0
L,1,2
L,3,4
L,4,5
K,100,,DL
k,101,,-DL
K,200,DXC,DL
k,201,2*DXC
K,202,DXC,-DL
LSEL,S,,,1
LATT,1,,1,,100,101,1
lesize,all,,,100
LSEL,S,,,2
LATT,1,,1,,200,201,1
lesize,all,,,50
LSEL,S,,,3
LATT,1,,1,,201,202,1
lesize,all,,,50
LSEL,ALL
LMESH,ALL
/ESHAPE,1
EPLOT
