!EX3.6 合并线和连接线以进行映射网格划分
finish
/clear
/prep7
et,1,plane82
k,1,5
k,2,10
k,3,11,6
k,4,6,15
k,5,-1,8
k,6,,4
l,1,2
l,2,3
l,3,4
larc,4,5,3,10
l,5,6
l,6,1
al,all
esize,3
mshape,0
mshkey,1
lccat,1,2
lcomb,4,5
amesh,all
