!EX3.7 合并线或连接线的网格划分设置
finish
/clear
/prep7
et,1,plane82
k,1,5
k,2,10
k,3,11,6
k,4,6,15
k,5,-1,8
k,6,,4
l,1,2
l,2,3
l,3,4
larc,4,5,3,10
l,5,6
l,6,1
al,all
esize,,10
lesize,6,,,8
lesize,1,,,4
lesize,2,,,3
lesize,4,,,5
lesize,5,,,2
mshape,0
mshkey,1
lcomb,1,2
!lccat,1,2
!如采用lcatt,1,2则采用7个划分数
lcomb,4,5
amesh,all
