!EX3.15 圆锥的网格划分
!扫掠网格划分
finish
/clear
/prep7
cone,10,,,15,,90
et,1,200,7
et,2,95
lsel,s,,,5,6
lesize,all,,,12,0.5
lsel,all
lesize,3,,,6
mshape,0,2d
mshkey,1
amesh,3
vsweep,1,3,4
vsymm,x,all
vsymm,y,all
vglue,all
!六面体映射网格划分
finish
/clear
/prep7
cone,10,,,15,,90
et,2,95
lesize,all,,,8
mshape,0,3d
mshkey,1
vmesh,all
vsymm,x,all
vsymm,y,all
vglue,all
