!EX3.27长方体开圆柱槽的网格划分
finish
/clear
/prep7
blc5,,,20,10,30
wpoff,,5,5
cyl4,,,8,,,,10
wpoff,,,10
cyl4,,,4,,,,12
vsel,s,,,2,3
cm,v1cm,volu
allsel
wpcsys,-1
vsbv,1,v1cm
voffst,15,5
voffst,16,3
voffst,17,15
vptn,all
wprota,,,90
vsbw,all

wpcsys,-1
wpoff,,,5
vsbw,all
wpoff,,,10
vsbw,all
wpoff,,,12
vsbw,all

et,1,mesh200,7
esize,2
mshape,0,2d
mshkey,1
asel,s,loc,z,30
lccat,6,74
lccat,8,68
amesh,all
asel,s,loc,z,0
lccat,3,73
lccat,1,67
amesh,all


allsel
et,2,solid95
mshape,0,3d
mshkey,1
vsweep,all
