!ex4.1累加节点自由度约束值
finish
/clear
/prep7
et,1,beam3
k,1
k,2,10
l,1,2
esize,1
lmesh,all
d,1,ux,1e-2,,,,uy
d,1,rotz
d,2,all
dlist
nsel,s,d,u,0,0.1
dofsel,s,uy
dscale,2.5
dlist
dofsel,all
dcum,add
d,1,ux,2e-2
dlist
dcum,igno
d,2,uy,1.0
dlist
