!ex4.11 ldread命令的示例
finish
/clear
/filname,ldtest1
/prep7
et,1,plane82
mp,ex,1,2.1e5
mp,prxy,1,0.3
blc4,,,10,40
esize,2
amesh,all
d,all,all
sfl,3,pres,100
/solu
solve
/post1
prrsol
finish
/filename,ldtest2
/solu
lsclear,all
nsel,s,loc,y,0
d,all,all
allsel
ldread,reac,,,,,ldtest1,rst
solve
/post1
plnsol,s,y
