!ex4.12 初应力荷载
finish
/clear
/filname,colu1
/prep7
et,1,plane82
mp,ex,1,2e5
mp,nuxy,1,0.3
blc4,,,1,10
esize,2
amesh,all
nsel,s,loc,y,0
d,all,uy
d,1,ux
nsel,s,loc,y,10
sf,all,pres,-10
allsel
finish
/solu
iswrite,on
solve
finish
!为说明问题，这里重新建模
finish
/clear
/filname,colu2
/prep7
et,1,plane82
mp,ex,1,2e5
mp,nuxy,1,0.3
blc4,,,1,10
esize,2
amesh,all
nsel,s,loc,y,0
d,all,uy
d,1,ux
allsel
/solu
loc=2
isfile,read,colu1,ist,,loc
isfile,list
solve
