!ex4.13悬臂梁荷载作用下的应力场但无位移场
finish
/clear
/filname,cant1
/prep7
et,1,plane42
mp,ex,1,2e5
mp,nuxy,1,0.3
blc4,,,10,1
esize,0.5
amesh,all
nsel,s,loc,x,0
d,all,all
allsel
f,2,fy,-10
finish
/solu
iswrite,on
solve
/post1
pldisp
plnsol,s,x
/solu
isfile,read,cant1,ist,,2
!fdele,all,all
solve
/post1
pldisp
plnsol,s,x
