!ex4.14 利用惯性释放求解自平衡结构的内力和变形
finish
/clear
/prep7
et,1,beam3
mp,ex,1,2.1e11
mp,prxy,1,0.3
mp,dens,1,7800
r,1,0.2,0.05,0.2
k,1,10,10
k,2,15,10
k,3,15,15
k,4,10,15
l,1,2
l,2,3
l,3,4
lesize,all,,,10
lmesh,all
/solu
antype,0
irlf,1
d,19,all
f,22,fy,1000
f,1,fy,-1000
solve
finish
/post1
pldisp,1
etable,mi,smisc,6
etable,mj,smisc,12
plls,mi,mj,-1
irlist
prrsol
