!EX4.16 命令PSTRES和SSTIF比较
finish
/clear
/prep7
et,1,3
r,1,300,10000,20
mp,ex,1,2e5
mp,nuxy,1,0.3
k,1
k,2,100
l,1,2
esize,,10
lmesh,all
finish
/solu
antype,static
!sstif,on
!pstres,on
dk,1,all
fk,2,fx,300000
fk,2,fy,-30000
solve
finish
/post1
set,last
plnsol,u,y
