!EX6.21 梯度荷载加载
finish
/clear
/prep7
blc4,,,10,20,30
et,1,solid95
esize,2
mshape,0,3d
mshkey,1
vmesh,all
sfgrad,pres,,y,10,-8
sfa,6,1,pres,10
nsel,s,loc,y,0,10
nsel,r,loc,z,30
sf,all,pres,10
sfgrad,pres,,z,0,10
sfa,4,1,pres,12
sftran
sfgrad
/view,1,1,1,1
/vscale,,3
/psf,pres,norm,2
eplot
