!EX6.40 静定平面刚架的温度变形
!beam3单元
finish
/clear
/prep7
l=4
h=0.4
b=0.2
a0=b*h
i0=b*h**3/12
et,1,beam3
mp,ex,1,2.1e11
mp,prxy,1,0.3
mp,alpx,1,1.0e-5
r,1,a0,i0,h
k,1
k,2,,l
k,3,l,l
l,1,2
l,2,3
dk,1,all
lesize,all,,,10
lmesh,all
tref,20
bfe,all,temp,,-10,0,0,-10
!tref,0
!bfe,all,temp,,-30,-20,-20,-30
/eshape,1
/pbf,temp,,1
eplot
/solu
solve
/post1
pldisp,1
plnsol,u,y
