!EX8.5 端部受集中力的悬臂梁几何非线性分析
finish
/clear
/prep7
ee=207e3
b=10
h=10
lcd=300
aa=b*h
iz=b*h*h*h/12
phz=ee*iz/lcd/lcd
et,1,beam3
mp,ex,1,ee
mp,prxy,1,0.3
r,1,aa,iz,h
k,1
k,2,lcd
l,1,2
lesize,all,,,10
lmesh,all
finish
/solu
dk,1,all
antype,0
nlgeom,1
nsubst,20
outres,all,all
*do,i,1,10
fk,2,fy,-i*phz
time,i*phz
solve
*enddo
/post26
nsol,2,2,u,y
nsol,3,2,u,x
prod,4,2,,,,,,-1
prod,5,3,,,,,,-1
xvar,4
plvar,1
xvar,5
plvar,1
