!EX9.2 等厚度圆环孔板的模态分析-一般结构
finish
/clear
/prep7
!定义几何参数
r0=0.5
r1=1.5
r2=3.5
R3=2.5
h=0.2
nh=8
!定义单元类型与材料性质
et,1,solid45
mp,ex,1,2.1e11
mp,prxy,1,0.3
mp,dens,1,7800
r,1
!创建几何模型
*afun,deg
cyl4,,,r1,0,r2,45
cyl4,r3*cos(22.5),r3*sin(22.5),r0
asba,1,2
numcmp,all
voffst,1,h
!划分网格，创建整个模型
esize,0.15
vsweep,all
csys,1
vgen,8,all,,,,45
nummrg,all
!加载求解
/solu
asel,s,loc,x,r1
da,all,all
asel,all
antype,2
modopt,lanb,10
mxpand,10
solve
!后处理查看结果
/post1
set,list
